*Heading
 Interface crack onset and propagation; LEBIM & infinite matrix
** Job name: singlefibreInfMtrx Model name: SFinfmtrxUload
** Generated by: Abaqus/CAE 6.14-1
*Preprint, echo=NO, model=NO, history=NO, contact=NO
**
** PARTS
**
*Part, name=FIBRA
*Node
      1,          -2.,           0.
      2,          -2.,           2.
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*Element, type=CPE4
  1,   4,  27,  80,  26
  2,  27,  28,  81,  80
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*Nset, nset=Set-1, generate
    1,  5015,     1
*Elset, elset=Set-1, generate
    1,  4888,     1
*Elset, elset=_Fiberext_S1, internal
  199,  200,  201,  202,  203,  204
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*Elset, elset=_Fiberext_S2, internal, generate
 3625,  4505,    20
*Surface, type=ELEMENT, name=Fiberext
_Fiberext_S1, S1
_Fiberext_S2, S2
** Section: Fiber-section
*Solid Section, elset=Set-1, material=Fglass
,
*End Part
**
*Part, name=Interface1
*Node
      1,          7.5,           0.
      2,   7.51000023,           0.
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*Element, type=CPE4
 1,   1,   2,   4,   3
 2,   3,   4,   6,   5
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*Nset, nset=IPext
 2,
*Nset, nset=IPint
 1,
*Nset, nset=Set-1, generate
   1,  182,    1
*Elset, elset=Set-1, generate
  1,  90,   1
*Elset, elset=_Interfext_S2, internal, generate
  1,  90,   1
*Surface, type=ELEMENT, name=Interfext
_Interfext_S2, S2
*Elset, elset=_Interfint_S4, internal, generate
  1,  90,   1
*Surface, type=ELEMENT, name=Interfint
_Interfint_S4, S4
*Orientation, name=Ori-1, system=CYLINDRICAL
          0.,           0.,           0.,           0.,           0.,           1.
3, 0.
** Section: Interface-section
*Solid Section, elset=Set-1, orientation=Ori-1, material=InterfaceMat1
,
*End Part
**
*Part, name=Interface2
*Node
      1,  -7.51000023,           0.
      2,         -7.5,           0.
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*Element, type=CPE4
 1,   1,   2,   4,   3
 2,   3,   4,   6,   5
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*Nset, nset=Set-1, generate
   1,  182,    1
*Elset, elset=Set-1, generate
  1,  90,   1
*Orientation, name=Ori-1, system=CYLINDRICAL
          0.,           0.,           0.,           0.,           0.,           1.
3, 0.
** Section: Interface-section
*Solid Section, elset=Set-1, orientation=Ori-1, material=InterfaceMat1
,
*End Part
**
*Part, name=MATRIZ
*Node
      1,   9.98999977,           0.
      2,    7.0610857,   7.07105017
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*Element, type=CPE4
  1,    3,   55,  458,  180
  2,   55,   56,  459,  458
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*Nset, nset=Set-1, generate
     1,  35114,      1
*Elset, elset=Set-1, generate
     1,  34740,      1
*Nset, nset=Loadnset
 4625, 4626, 4799, 4800, 4801, 4802
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*Nset, nset=mtrxnodeset
   4,   5,   8,   9,  10,  74
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*Elset, elset=ELoadnset, generate
 8821,  8865,     1
*Elset, elset=_LeftFace_S3, internal, generate
 28126,  28170,      1
*Surface, type=ELEMENT, name=LeftFace
_LeftFace_S3, S3
*Elset, elset=_LoadSurfs_S3, internal
  8821,  8822,  8823,  8824,  8825,  8826
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*Surface, type=ELEMENT, name=LoadSurfs
_LoadSurfs_S3, S3
*Elset, elset=_MtrxInt_S2, internal, generate
   20,  2700,    20
*Elset, elset=_MtrxInt_S4, internal, generate
 2701,  3581,    20
*Surface, type=ELEMENT, name=MtrxInt
_MtrxInt_S2, S2
_MtrxInt_S4, S4
*Elset, elset=_RightFace_S3, internal, generate
 8821,  8865,     1
*Surface, type=ELEMENT, name=RightFace
_RightFace_S3, S3
*Orientation, name=Ori-1, system=CYLINDRICAL
-0.00999999999999091,           0.,           0., -0.00999999999999091,           0.,           1.
3, 0.
** Section: Matrix-section
*Solid Section, elset=Set-1, orientation=Ori-1, material=MatrixMat
,
*End Part
**
**
** ASSEMBLY
**
*Assembly, name=Assembly
**
*Instance, name=FIBRA-1, part=FIBRA
*End Instance
**
*Instance, name=MATRIZ-1, part=MATRIZ
0.0100000000001046,           0.,           0.
*End Instance
**
*Instance, name=Interface1-1, part=Interface1
*End Instance
**
*Instance, name=Interface2-1, part=Interface2
*End Instance
**
*Nset, nset=CNode, instance=FIBRA-1
 3,
*Nset, nset=CPoint, instance=FIBRA-1
 3,
*Elset, elset=El2, instance=MATRIZ-1
 28126,
*Nset, nset=Interf_extnodes, instance=Interface2-1, generate
   1,  181,    2
*Nset, nset=Interf_extnodes, instance=Interface1-1, generate
   2,  182,    2
*Nset, nset=Interf_intnodes, instance=Interface2-1, generate
   2,  182,    2
*Nset, nset=Interf_intnodes, instance=Interface1-1, generate
   1,  181,    2
*Nset, nset=LFace, instance=MATRIZ-1
 4578, 4579, 4580, 4581, 4582, 4583
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*Elset, elset=LFace, instance=MATRIZ-1, generate
 28126,  28170,      1
*Nset, nset=LPoint, instance=MATRIZ-1
 4624,
*Elset, elset=MatrxElem, instance=MATRIZ-1
 8865,
*Elset, elset=NINTERFACE, instance=Interface1-1, generate
  1,  90,   1
*Elset, elset=NINTERFACE, instance=Interface2-1, generate
  1,  90,   1
*Elset, elset=NINTERFACE-L, instance=Interface2-1, generate
  1,  90,   1
*Elset, elset=NINTERFACE-R, instance=Interface1-1, generate
  1,  90,   1
*Nset, nset=RFace, instance=MATRIZ-1
 4625, 4626, 4799, 4800, 4801, 4802
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*Elset, elset=RFace, instance=MATRIZ-1, generate
 8821,  8865,     1
*Nset, nset=RPoint, instance=MATRIZ-1
 4625,
*Nset, nset=TopBC, instance=MATRIZ-1
 4622,
*Nset, nset=Y0Symm, instance=FIBRA-1
   1,   3,   5,  16,  17,  35
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*Nset, nset=Y0Symm, instance=MATRIZ-1
    1,    7,    8,   10,  225,  226
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*Nset, nset=Y0Symm, instance=Interface2-1
 1, 2
*Nset, nset=Y0Symm, instance=Interface1-1
 1, 2
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*Elset, elset=_FiberExt_S1, internal, instance=FIBRA-1
  199,  200,  201,  202,  203,  204
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*Elset, elset=_FiberExt_S2, internal, instance=FIBRA-1, generate
 3625,  4505,    20
*Surface, type=ELEMENT, name=FiberExt
_FiberExt_S1, S1
_FiberExt_S2, S2
*Elset, elset=_InterExtSurf_S2, internal, instance=Interface1-1, generate
  1,  90,   1
*Elset, elset=_InterExtSurf_S4, internal, instance=Interface2-1, generate
  1,  90,   1
*Surface, type=ELEMENT, name=InterExtSurf
_InterExtSurf_S2, S2
_InterExtSurf_S4, S4
*Elset, elset=_InterfIntSurf_S4, internal, instance=Interface1-1, generate
  1,  90,   1
*Elset, elset=_InterfIntSurf_S2, internal, instance=Interface2-1, generate
  1,  90,   1
*Surface, type=ELEMENT, name=InterfIntSurf
_InterfIntSurf_S4, S4
_InterfIntSurf_S2, S2
*Elset, elset=_MtrxIntfSurf_S2, internal, instance=MATRIZ-1, generate
   20,  2700,    20
*Elset, elset=_MtrxIntfSurf_S4, internal, instance=MATRIZ-1, generate
 2701,  3581,    20
*Surface, type=ELEMENT, name=MtrxIntfSurf
_MtrxIntfSurf_S2, S2
_MtrxIntfSurf_S4, S4
*Elset, elset=_S_SURF-2_S3, internal, instance=MATRIZ-1, generate
 8821,  8865,     1
*Surface, type=ELEMENT, name=S_SURF-2
_S_SURF-2_S3, S3
*Elset, elset=_S_SURF-3_S3, internal, instance=MATRIZ-1, generate
 28126,  28170,      1
*Surface, type=ELEMENT, name=S_SURF-3
_S_SURF-3_S3, S3
*Elset, elset=_TOP_SURF_S3, internal, instance=MATRIZ-1
 14626, 14627, 14628, 14629, 14630, 14631
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*Surface, type=ELEMENT, name=TOP_SURF
_TOP_SURF_S3, S3
*Elset, elset=_T_SURF_S3, internal, instance=MATRIZ-1
 14626, 14627, 14628, 14629, 14630, 14631
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*Surface, type=ELEMENT, name=T_SURF
_T_SURF_S3, S3
*Elset, elset=_m_Surf-3_S3, internal, instance=Interface2-1
 90,
*Surface, type=ELEMENT, name=m_Surf-3
_m_Surf-3_S3, S3
*Elset, elset=_m_Surf-5_S2, internal, instance=Interface1-1, generate
  1,  90,   1
*Elset, elset=_m_Surf-5_S4, internal, instance=Interface2-1, generate
  1,  90,   1
*Surface, type=ELEMENT, name=m_Surf-5
_m_Surf-5_S2, S2
_m_Surf-5_S4, S4
*Elset, elset=_m_Surf-6_S4, internal, instance=Interface1-1, generate
  1,  90,   1
*Elset, elset=_m_Surf-6_S2, internal, instance=Interface2-1, generate
  1,  90,   1
*Surface, type=ELEMENT, name=m_Surf-6
_m_Surf-6_S4, S4
_m_Surf-6_S2, S2
*Elset, elset=_s_Surf-12_S3, internal, instance=Interface1-1
 90,
*Surface, type=ELEMENT, name=s_Surf-12
_s_Surf-12_S3, S3
** Constraint: Constraint-1
*Tie, name=Constraint-1, adjust=yes
InterfIntSurf, FiberExt
** Constraint: Constraint-2
*Tie, name=Constraint-2, adjust=yes
InterExtSurf, MtrxIntfSurf
** Constraint: Constraint-3
*Tie, name=Constraint-3, adjust=yes
s_Surf-12, m_Surf-3
*End Assembly
**
** MATERIALS
** Glass fiber **
*Material, name=Fglass
*Elastic
 0.0708, 0.22
** Linear elastic brittle interface mechanical properties.
*Material, name=InterfaceMat1
*Depvar
     19,
*User Material, constants=6
 9e-05, 0.25E-6,     0.3,    0.25,    0.01,    8.
*Material, name=MatrixMat
*Elastic
 0.00279, 0.33
**
** BOUNDARY CONDITIONS
**
** Name: BC-1 Type: Symmetry/Antisymmetry/Encastre
*Boundary
Y0Symm, YSYMM
** Name: BC-2 Type: Displacement/Rotation
*Boundary
TopBC, 1, 1
** ----------------------------------------------------------------
**
** STEP: Step-1
**
*Step, name=Step-1, nlgeom=NO, inc=1
*Static
1., 1., 1., 1.
**
** OUTPUT REQUESTS
**
**Restart, write, frequency=0
**
** FIELD OUTPUT: F-Output-1
**
*Output, field
*Node Output
U,
**
** FIELD OUTPUT: F-Output-8
**
*Output, field, frequency=99999
*Node Output, nset=CNode
U,
**
** FIELD OUTPUT: F-Output-4
**
*Node Output, nset=Interf_extnodes
COORD, U
**
** FIELD OUTPUT: F-Output-3
**
*Node Output, nset=Interf_intnodes
COORD, U
**
** FIELD OUTPUT: F-Output-7
**
*Element Output, elset=NINTERFACE, directions=YES
EVOL, SDV,
**
** FIELD OUTPUT: F-Output-5
**
*Node Output, nset=RFace
RF, RT, U
**
** HISTORY OUTPUT: H-Output-1
**
*Output, history
*Energy Output
ALLSE, ALLWK
**
** HISTORY OUTPUT: H-Output-5
**
*Output, history, frequency=99999
*Element Output, elset=El2
S11,
**
** HISTORY OUTPUT: H-Output-3
**
*Node Output, nset=Interface1-1.IPext
U1,
**
** HISTORY OUTPUT: H-Output-4
**
*Node Output, nset=Interface1-1.IPint
U1,
**
** HISTORY OUTPUT: H-Output-6
**
*Node Output, nset=MATRIZ-1.Loadnset
RF1,
**
** HISTORY OUTPUT: H-Output-2
**
*Element Output, elset=MatrxElem
S11,
*End Step
